# OpenSim document version 40000
AnalyzeTool opensenseIMUDataReporter:
  model_file: ./VirtualSubjectModels\virtual_subject_1.osim
  replace_force_set: false
  results_directory: ./Results
  output_precision: 8
  initial_time: 10.51
  final_time: 17
  solve_for_equilibrium_for_auxiliary_states: false
  maximum_number_of_integrator_steps: 20000
  maximum_integrator_step_size: 1
  minimum_integrator_step_size: 1e-8
  integrator_error_tolerance: 1e-5
  coordinates_file: walking_motion.sto
  lowpass_cutoff_frequency_for_coordinates: -1
  AnalysisSet Analyses:
    IMUDataReporter: report_orientations=true report_gyroscope_signals=true report_accelerometer_signals=true
        start_time=10.51 end_time=17 step_interval=1 in_degrees=true
